*Heading
** Job name: CE_IMPLICIT Model name: ASCavityExpansion
** Generated by: Abaqus/CAE 2019
*Preprint, echo=NO, model=NO, history=NO, contact=NO
**
** PARTS
**
*INCLUDE, input=Model_Para.dat
*Part, name=CE
*Node
      1,         37.5,           0.
      2,   40.0467148,           0.
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*Element, type=CAX8R
  1,   1,   2, 103, 102, 203, 204, 205, 206
  2,   2,   3, 104, 103, 207, 208, 209, 204
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*Nset, nset=All, generate
   1,  503,    1
*Elset, elset=All, generate
   1,  100,    1
*Nset, nset=wall
 102,
** Section: Rock
*Solid Section, elset=All, material=DPIsodwSD
,
*End Part
**
**
** ASSEMBLY
**
*Assembly, name=Assembly
**
*Instance, name=CE-1, part=CE
*End Instance
**
*Nset, nset=All, instance=CE-1, generate
   1,  503,    1
*Elset, elset=All, instance=CE-1, generate
   1,  100,    1
*Nset, nset=Bottom, instance=CE-1
   1,   2,   3,   4,   5,   6
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*Elset, elset=Bottom, instance=CE-1, generate
   1,  100,    1
*Nset, nset=Farfield, instance=CE-1
 101, 202, 502
*Elset, elset=Farfield, instance=CE-1
 100,
*Nset, nset=LoadingSurface, instance=CE-1
   1, 102, 206
*Elset, elset=LoadingSurface, instance=CE-1
 1,
*Nset, nset=Top, instance=CE-1
 102, 103, 104, 105, 106, 107
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*Elset, elset=Top, instance=CE-1, generate
   1,  100,    1
*Nset, nset=TopBottom, instance=CE-1
   1,   2,   3,   4,   5,   6
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*Elset, elset=TopBottom, instance=CE-1, generate
   1,  100,    1
*Elset, elset=_Farfield_S2, internal, instance=CE-1
 100,
*Surface, type=ELEMENT, name=Farfield
_Farfield_S2, S2
*Elset, elset=_LoadingSurface_S4, internal, instance=CE-1
 1,
*Surface, type=ELEMENT, name=LoadingSurface
_LoadingSurface_S4, S4
*Elset, elset=_UpperFace_S3, internal, instance=CE-1, generate
   1,  100,    1
*Surface, type=ELEMENT, name=UpperFace
_UpperFace_S3, S3
*End Assembly
*Amplitude, name=Loading
             0.,              0.,              1.,              1.
*Amplitude, name=Relief
             0.,              1.,              1.,              0.
*Amplitude, name=Unloading
             0.,              1.,              1.,            0.01
**
** MATERIALS
**
*Material, name=DPIsodwSD
*Density
 2.5e-06,
*Depvar
     30,
*User Material, constants=8
<E1>,     <nu>,      <kappa>, <c0>,     <dmax>,  <c1>,     <bb>,     <B>
**
** BOUNDARY CONDITIONS
**
** Name: BTMsymmetry Type: Symmetry/Antisymmetry/Encastre
*Boundary
Bottom, YSYMM
**
** PREDEFINED FIELDS
**
** Name: Geostatic   Type: Stress
*Initial Conditions, type=STRESS
All, -5., -5., -5., 0., 0., 0.
** ----------------------------------------------------------------
**
** STEP: Geostatic
**
*Step, name=Geostatic, nlgeom=NO, inc=1000, unsymm=YES
*Static
0.1, 1., 1e-05, 0.1
**
** LOADS
**
** Name: BoundaryLoading   Type: Pressure
*Dsload
Farfield, P, 5.
** Name: SurfaceLoading   Type: Pressure
*Dsload
LoadingSurface, P, 5.
** Name: YLoad   Type: Pressure
*Dsload
UpperFace, P, 5.
**
** CONTROLS
**
*Controls, reset
*Controls, parameters=time incrementation
, , , 100, 20, , , , , ,
**
** OUTPUT REQUESTS
**
*Restart, write, frequency=0
**
** FIELD OUTPUT: F-Output-1
**
*Output, field
*Node Output
U,
*Element Output, directions=YES
E, EE, MISES, S, SDV
*Output, history, frequency=0
*End Step
** ----------------------------------------------------------------
**
** STEP: StressRelief
**
*Step, name=StressRelief, nlgeom=NO, inc=2000, unsymm=YES
*Static
0.001, 1., 1e-10, 0.005
**
** BOUNDARY CONDITIONS
**
** Name: TOPsymmetry Type: Displacement/Rotation
*Boundary, fixed
Top, 2, 2
**
** LOADS
**
** Name: BoundaryLoading   Type: Pressure
*Dsload, op=NEW
Farfield, P, 5.
** Name: SurfaceLoading   Type: Pressure
*Dsload, op=NEW
LoadingSurface, P, 0.
** Name: YLoad   Type: Pressure
*Dsload, op=NEW
**
** CONTROLS
**
*Controls, reset
*Controls, parameters=time incrementation
60, 80, , 100, , , , , , ,
*Controls, parameters=field, field=displacement
0.02, 0.03, , , , , ,
*Controls, parameters=field, field=hydrostatic fluid pressure
0.02, 0.03, , , , , ,
*Controls, parameters=field, field=rotation
0.02, 0.03, , , , , ,
*Controls, parameters=field, field=electrical potential
0.02, 0.03, , , , , ,
**
** SOLVER CONTROLS
**
*Solver Controls, reset
*Solver Controls
,
**
** OUTPUT REQUESTS
**
*Restart, write, frequency=0
**
** FIELD OUTPUT: F-Output-1
**
*Output, field
*Node Output
U,
*Element Output, directions=YES
E, EE, MISES, S, SDV
**
** FIELD OUTPUT: F-Output-3
**
*Node Output
U,
*Element Output, directions=YES
E, ENER, S, SDV
**
** HISTORY OUTPUT: wall_monitor
**
*Output, history
*Node Output, nset=CE-1.wall
U1,
*End Step
** ----------------------------------------------------------------
**
** STEP: Pushing
**
*Step, name=Pushing, nlgeom=NO, inc=2000, unsymm=NO
*Static
0.001, 1., 1e-10, 0.002
**
** LOADS
**
** Name: SurfaceLoading   Type: Pressure
*Dsload
LoadingSurface, P, 10.
**
** CONTROLS
**
*Controls, reset
*Controls, parameters=time incrementation
40, 60, , 100, , 100, , , , ,
*Controls, parameters=field, field=displacement
0.02, 0.03, , , , , ,
*Controls, parameters=field, field=hydrostatic fluid pressure
0.02, 0.03, , , , , ,
*Controls, parameters=field, field=rotation
0.02, 0.03, , , , , ,
*Controls, parameters=field, field=electrical potential
0.02, 0.03, , , , , ,
**
** SOLVER CONTROLS
**
*Solver Controls, reset
*Solver Controls
,
**
** OUTPUT REQUESTS
**
*Restart, write, frequency=0
**
** FIELD OUTPUT: F-Output-1
**
*Output, field
*Node Output
U,
*Element Output, directions=YES
E, EE, MISES, S, SDV
**
** FIELD OUTPUT: F-Output-3
**
*Node Output
U,
*Element Output, directions=YES
E, ENER, S, SDV
**
** HISTORY OUTPUT: wall_monitor
**
*Output, history
*Node Output, nset=CE-1.wall
U1,
*End Step
